*Heading
** Job name: equi_strain Model name: Model-1
** Generated by: Abaqus/CAE 2020
*Preprint, echo=NO, model=NO, history=NO, contact=NO
**
** PARTS
**
*Part, name=Part-1
*Node
      1,           0.,           0.
      2, 0.00999999978,           0.
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*Element, type=CPS4
    1,     1,     2,   103,   102
    2,     2,     3,   104,   103
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*Nset, nset=Set-2, generate
     1,  10201,      1
*Elset, elset=Set-2, generate
     1,  10000,      1
*Orientation, name=Ori-1
1., 0., 0., 0., 1., 0.
3, 0.
** Section: Section-1
*Solid Section, elset=Set-2, orientation=Ori-1, material=NODE_MM
,
*End Part
**
**
** ASSEMBLY
**
*Assembly, name=Assembly
**
*Instance, name=Part-1-1, part=Part-1
*End Instance
**
*Nset, nset=set_btm_surface, instance=Part-1-1, generate
   1,  101,    1
*Elset, elset=set_btm_surface, instance=Part-1-1, generate
   1,  100,    1
*Nset, nset=set_lft_surface, instance=Part-1-1, generate
     1,  10101,    101
*Elset, elset=set_lft_surface, instance=Part-1-1, generate
    1,  9901,   100
*Nset, nset=set_rgt_surface, instance=Part-1-1, generate
   101,  10201,    101
*Elset, elset=set_rgt_surface, instance=Part-1-1, generate
   100,  10000,    100
*Nset, nset=set_top_surface, instance=Part-1-1, generate
 10101,  10201,      1
*Elset, elset=set_top_surface, instance=Part-1-1, generate
  9901,  10000,      1
*Elset, elset=_Surf-3_S2, internal, instance=Part-1-1, generate
   100,  10000,    100
*Surface, type=ELEMENT, name=Surf-3
_Surf-3_S2, S2
*Elset, elset=_s_Surf-1_S3, internal, instance=Part-1-1, generate
  9901,  10000,      1
*Surface, type=ELEMENT, name=s_Surf-1
_s_Surf-1_S3, S3
*Elset, elset=_s_Surf-4_S2, internal, instance=Part-1-1, generate
   100,  10000,    100
*Surface, type=ELEMENT, name=s_Surf-4
_s_Surf-4_S2, S2
*Elset, elset=_s_Surf-5_S3, internal, instance=Part-1-1, generate
  9901,  10000,      1
*Surface, type=ELEMENT, name=s_Surf-5
_s_Surf-5_S3, S3
*End Assembly
**
** MATERIALS
**
*Material, name=NODE_MM
*Anisotropic Hyperelastic, user, formulation=INVARIANT, type=INCOMPRESSIBLE, local direction=2, properties=3, moduli=INSTANTANEOUS
999.,999.,999.
**
** BOUNDARY CONDITIONS
**
** Name: bc_xsymm_lft_surface Type: Symmetry/Antisymmetry/Encastre
*Boundary
set_lft_surface, XSYMM
** Name: bc_ysymm_btm_surface Type: Symmetry/Antisymmetry/Encastre
*Boundary
set_btm_surface, YSYMM
** ----------------------------------------------------------------
**
** STEP: Step-1
**
*Step, name=Step-1, nlgeom=YES
*Static
1., 1., 1e-05, 1.
**
** BOUNDARY CONDITIONS
**
** Name: bc_disp_rgt_surface Type: Displacement/Rotation
*Boundary
set_rgt_surface, 1, 1, 1.17
** Name: bc_disp_top_surface Type: Displacement/Rotation
*Boundary
set_top_surface, 2, 2, 1.17
**
** OUTPUT REQUESTS
**
*Restart, write, frequency=0
**
** FIELD OUTPUT: F-Output-1
**
*Output, field
*Node Output
CF, RF, U
*Element Output, directions=YES
E, EE, LE, NE, PE, PEEQ, PEMAG, S
*Contact Output
CDISP, CSTRESS
**
** HISTORY OUTPUT: H-Output-1
**
*Output, history, variable=PRESELECT
*End Step
