*Heading
** Job name: square Model name: Model-1
** Generated by: Abaqus/CAE 2020
*Preprint, echo=NO, model=NO, history=NO, contact=NO
**
** PARTS
**
*Part, name=Part-1
*Node
      1,           0.,           0.
      2, 0.00999999978,           0.
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*Element, type=CPS4
    1,     1,     2,   103,   102
    2,     2,     3,   104,   103
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*Nset, nset=Set-2, generate
     1,  10201,      1
*Elset, elset=Set-2, generate
     1,  10000,      1
*Orientation, name=Ori-1
1., 0., 0., 0., 1., 0.
3, 0.
** Section: Section-1
*Solid Section, elset=Set-2, orientation=Ori-1, material=NODE_MM
,
*End Part
**
**
** ASSEMBLY
**
*Assembly, name=Assembly
**
*Instance, name=Part-1-1, part=Part-1
*End Instance
**
*Node
      1,           1.,          0.5,           0.
*Node
      2,          0.5,           1.,           0.
*Nset, nset=Set-4
 1,
*Nset, nset=Set-5
 2,
*Nset, nset=Set-6
 1,
*Nset, nset=Set-7
 2,
*Nset, nset=Set-8, instance=Part-1-1, generate
   1,  101,    1
*Elset, elset=Set-8, instance=Part-1-1, generate
   1,  100,    1
*Nset, nset=Set-9, instance=Part-1-1, generate
     1,  10101,    101
*Elset, elset=Set-9, instance=Part-1-1, generate
    1,  9901,   100
*Nset, nset=m_Set-2
 1,
*Nset, nset=m_Set-3
 2,
*Nset, nset=p_Set-1, instance=Part-1-1, generate
   101,  10201,    101
*Elset, elset=p_Set-1, instance=Part-1-1, generate
   100,  10000,    100
*Elset, elset=_Surf-3_S2, internal, instance=Part-1-1, generate
   100,  10000,    100
*Surface, type=ELEMENT, name=Surf-3
_Surf-3_S2, S2
*Elset, elset=_s_Surf-1_S3, internal, instance=Part-1-1, generate
  9901,  10000,      1
*Surface, type=ELEMENT, name=s_Surf-1
_s_Surf-1_S3, S3
*Elset, elset=_s_Surf-4_S2, internal, instance=Part-1-1, generate
   100,  10000,    100
*Surface, type=ELEMENT, name=s_Surf-4
_s_Surf-4_S2, S2
*Elset, elset=_s_Surf-5_S3, internal, instance=Part-1-1, generate
  9901,  10000,      1
*Surface, type=ELEMENT, name=s_Surf-5
_s_Surf-5_S3, S3
** Constraint: Constraint-1
*Coupling, constraint name=Constraint-1, ref node=m_Set-2, surface=s_Surf-4
*Kinematic
1, 1
6, 6
** Constraint: Constraint-2
*Coupling, constraint name=Constraint-2, ref node=m_Set-3, surface=s_Surf-5, influence radius=0.49
*Kinematic
2, 2
6, 6
*End Assembly
**
** MATERIALS
**
*Material, name=NODE_MM
*Anisotropic Hyperelastic, user, formulation=INVARIANT, type=INCOMPRESSIBLE, local direction=0, properties=3, moduli=INSTANTANEOUS
999.,999.,999.
**
** BOUNDARY CONDITIONS
**
** Name: BC-1 Type: Displacement/Rotation
*Boundary
Set-4, 2, 2
Set-4, 6, 6
** Name: BC-2 Type: Displacement/Rotation
*Boundary
Set-5, 1, 1
Set-5, 6, 6
** Name: BC-3 Type: Symmetry/Antisymmetry/Encastre
*Boundary
Set-8, YSYMM
** Name: BC-4 Type: Symmetry/Antisymmetry/Encastre
*Boundary
Set-9, XSYMM
** ----------------------------------------------------------------
**
** STEP: Step-1
**
*Step, name=Step-1, nlgeom=YES
*Static
1., 1., 1e-05, 1.
**
** LOADS
**
** Name: Load-1   Type: Concentrated force
*Cload
Set-6, 1, 0.9999
** Name: Load-2   Type: Concentrated force
*Cload
Set-7, 2, 0.9999
**
** OUTPUT REQUESTS
**
*Restart, write, frequency=0
**
** FIELD OUTPUT: F-Output-1
**
*Output, field, variable=PRESELECT
**
** HISTORY OUTPUT: H-Output-1
**
*Output, history, variable=PRESELECT
*End Step
